# OpenSim document version 40000
Model ModelDoublePendulumTwoHingeJoints:
  gravity: 0 -9.80665 0
  TableReporter__Vec3_ reporter: report_time_interval=0.01 [s]
      input_inputs=(/bodyset/UpperPendulum/FirstXsensIMU|linear_acceleration(Xsens1_lin_acc) /bodyset/UpperPendulum/FirstXsensIMU|angular_velocity(Xsens1_ang_vel) /bodyset/LowerPendulum/SecondXsensIMU|linear_acceleration(Xsens2_lin_acc) /bodyset/LowerPendulum/SecondXsensIMU|angular_velocity(Xsens2_ang_vel))
  TableReporter__double_ TauReporter: report_time_interval=0.01 [s]
      input_inputs=(/forceset/UpperPendulumToGround_coord_0|actuation(Torque1) /forceset/LowerPendulumToUpperPendulum_coord_0|actuation(Torque2))
  Ground
  BodySet:
    Body UpperPendulum: mass=1 [kg] mass_center=(0 0.5 0) inertia=(0.08583333 0.08583333 0.005 0 0 0)
      PhysicalOffsetFrame Pendulum1Geom: socket_parent=.. translation=(0 0.5 0) [meters]
        Cylinder Pendulum1Geom_geom_1: radius=0.1 half_height=0.5
      PhysicalOffsetFrame FirstXsensIMU: socket_parent=.. translation=(0 0 0)
    Body LowerPendulum: mass=1 mass_center=(0 0.5 0) inertia=(0.08583333 0.08583333 0.005 0 0 0)
      PhysicalOffsetFrame Pendulum2Geom: socket_parent=.. translation=(0 0.5 0)
        Cylinder Pendulum2Geom_geom_1: radius=0.1 half_height=0.5
      PhysicalOffsetFrame SecondXsensIMU: socket_parent=.. translation=(0 0 0)
  JointSet:
    PinJoint UpperPendulumToGround: socket_parent_frame=ground_offset socket_child_frame=UpperPendulum_offset
      Coordinate UpperPendulumToGround_coord_0: default_value=0
      PhysicalOffsetFrame ground_offset: socket_parent=/ground translation=(0 2 0)
      PhysicalOffsetFrame UpperPendulum_offset: socket_parent=/bodyset/UpperPendulum translation=(0 1 0)
    PinJoint LowerPendulumToUpperPendulum: socket_parent_frame=UpperPendulum_offset
        socket_child_frame=LowerPendulum_offset
      Coordinate LowerPendulumToUpperPendulum_coord_0: default_value=0
      PhysicalOffsetFrame UpperPendulum_offset: socket_parent=/bodyset/UpperPendulum translation=(0 0 0)
          orientation=(0 1.570796 0) [radians]
      PhysicalOffsetFrame LowerPendulum_offset: socket_parent=/bodyset/LowerPendulum translation=(0 1 0)
  ControllerSet:
    PrescribedController Brain1: actuator_list=UpperPendulumToGround_coord_0
      FunctionSet ControlFunctions:
        StepFunction: transition_start_time=0.5 transition_end_time=1.5 start_value=0 end_value=8
    PrescribedController Brain2: actuator_list=LowerPendulumToUpperPendulum_coord_0
      FunctionSet ControlFunctions:
        StepFunction: transition_start_time=2 transition_end_time=3 start_value=0 end_value=3
  ForceSet:
    CoordinateActuator UpperPendulumToGround_coord_0: coordinate=UpperPendulumToGround_coord_0 optimal_force=1
    CoordinateActuator LowerPendulumToUpperPendulum_coord_0: coordinate=LowerPendulumToUpperPendulum_coord_0
        optimal_force=1
