# OpenSim document version 40000
Model ModelDoublePendulumTwoHingeJoints:
  Ground
  BodySet:
    Body UpperPendulum: mass=1 [kg] mass_center=(0 0.5 0) inertia=(0.08583333 0.08583333 0.005 0 0 0)
      PhysicalOffsetFrame Pendulum1Geom: socket_parent=.. translation=(0 0.5 0) [meters]
        Cylinder Pendulum1Geom_geom_1: radius=0.1 half_height=0.5
    Body LowerPendulum: mass=1 mass_center=(0 0.5 0) inertia=(0.08583333 0.08583333 0.005 0 0 0)
      PhysicalOffsetFrame Pendulum2Geom: socket_parent=.. translation=(0 0.5 0)
        Cylinder Pendulum2Geom_geom_1: radius=0.1 half_height=0.5
  JointSet:
    PinJoint UpperPendulumToGround: socket_parent_frame=ground_offset socket_child_frame=UpperPendulum_offset
      Coordinate UpperPendulumToGround_coord_0
      PhysicalOffsetFrame ground_offset: socket_parent=/ground translation=(0 2 0)
      PhysicalOffsetFrame UpperPendulum_offset: socket_parent=/bodyset/UpperPendulum translation=(0 1 0)
    PinJoint LowerPendulumToUpperPendulum: socket_parent_frame=UpperPendulum_offset
        socket_child_frame=LowerPendulum_offset
      Coordinate LowerPendulumToUpperPendulum_coord_0
      PhysicalOffsetFrame UpperPendulum_offset: socket_parent=/bodyset/UpperPendulum translation=(0 0 0)
          orientation=(0 1.570796 0) [radians]
      PhysicalOffsetFrame LowerPendulum_offset: socket_parent=/bodyset/LowerPendulum translation=(0 1 0)
