# OpenSim document version 40000
Model Kukaiiwa7:
  gravity: 0 -9.81 0
  length_units: meters
  force_units: N
  credits:
    de Kanter, D. License: Creative Commons (CCBY 3.0). You are free to distribute, remix, tweak, and build upon this work, even commercially, as long as you credit us for the original creation. http://creativecommons.org/licenses/by/3.0/
  TableReporter__Vec3_ reporter: report_time_interval=0.01 [s]
      input_inputs=(/bodyset/link_1/FirstXsensIMU|linear_acceleration(Xsens1_lin_acc) /bodyset/link_1/FirstXsensIMU|angular_velocity(Xsens1_ang_vel) /bodyset/link_2/SecondXsensIMU|linear_acceleration(Xsens2_lin_acc) /bodyset/link_2/SecondXsensIMU|angular_velocity(Xsens2_ang_vel) /bodyset/link_3/ThirdXsensIMU|linear_acceleration(Xsens3_lin_acc) /bodyset/link_3/ThirdXsensIMU|angular_velocity(Xsens3_ang_vel) /bodyset/link_4/FourthXsensIMU|linear_acceleration(Xsens4_lin_acc) /bodyset/link_4/FourthXsensIMU|angular_velocity(Xsens4_ang_vel) /bodyset/link_5/FifthXsensIMU|linear_acceleration(Xsens5_lin_acc) /bodyset/link_5/FifthXsensIMU|angular_velocity(Xsens5_ang_vel) /bodyset/link_6/SixthXsensIMU|linear_acceleration(Xsens6_lin_acc) /bodyset/link_6/SixthXsensIMU|angular_velocity(Xsens6_ang_vel))
  Ground
  BodySet:
    Body link_0: mass=5 [kg] mass_center=(-0.1 0 0.07) inertia=(0.05 0.06 0.03 0 0 0) meshes=link_0.stl
    Body link_1: mass=3.4525 mass_center=(0 -0.03 0.12) inertia=(0.02183 0.007703 0.02083 0 0 -0.003887)
        meshes=link_1.stl
      PhysicalOffsetFrame FirstXsensIMU: socket_parent=.. translation=(0 -0.1 0.07) [meters]
          orientation=(1.870796 0 1.570796) [radians]
    Body link_2: mass=3.4821 mass_center=(0.0003 0.059 0.042) inertia=(0.02076 0.02179 0.00779 0 -0.003626 0)
        meshes=link_2.stl
      PhysicalOffsetFrame IntermediateFrameForXsens2: socket_parent=.. translation=(0 0 0)
          orientation=(-1.570796 0 3.141593)
      PhysicalOffsetFrame SecondXsensIMU: socket_parent=/bodyset/link_2/IntermediateFrameForXsens2
          translation=(0 0.095 0.12) orientation=(-1.270796 0 -1.570796)
    Body link_3: mass=4.05623 mass_center=(0 0.03 0.13) inertia=(0.03204 0.00972 0.03042 0 0 0.006227)
        meshes=link_3.stl
      PhysicalOffsetFrame ThirdXsensIMU: socket_parent=.. translation=(0 0.095 0.09)
          orientation=(-1.970796 0 -1.570796)
    Body link_4: mass=3.4822 mass_center=(0 0.067 0.034) inertia=(0.02178 0.02075 0.007785 0 0 -0.003625)
        meshes=link_4.stl
      PhysicalOffsetFrame IntermediateFrameForXsens4: socket_parent=.. translation=(0 0 0) orientation=(-1.570796 0 0)
      PhysicalOffsetFrame FourthXsensIMU: socket_parent=/bodyset/link_4/IntermediateFrameForXsens4
          translation=(0 -0.09 0.13) orientation=(1.270796 0 1.570796)
    Body link_5: mass=2.1633 mass_center=(0.0001 0.021 0.076) inertia=(0.01287 0.005708 0.01112 0 0 -0.003946)
        meshes=link_5.stl
      PhysicalOffsetFrame IntermediateFrameForXsens5: socket_parent=.. translation=(0 0 0) orientation=(0 0 3.141593)
      PhysicalOffsetFrame FifthXsensIMU: socket_parent=/bodyset/link_5/IntermediateFrameForXsens5
          translation=(0 -0.095 0.11) orientation=(1.870796 0 1.570796)
    Body link_6: mass=2.3466 mass_center=(0 0.0006 0.0004) inertia=(0.006509 0.006259 0.004527 0 0 0.00031891)
        meshes=link_6.stl
      PhysicalOffsetFrame IntermediateFrameForXsens6: socket_parent=.. translation=(0 0 0)
          orientation=(-1.570796 0 3.141593)
      PhysicalOffsetFrame SixthXsensIMU: socket_parent=/bodyset/link_6/IntermediateFrameForXsens6
          translation=(0 0.12 0.07) orientation=(-1.420796 0 -1.570796)
    Body link_7: mass=3.129 mass_center=(0 0.0006 0.0004) inertia=(0.01464 0.01465 0.002872 0.0005912 0 0)
        meshes=link_7.stl
  JointSet:
    WeldJoint FixedToGround: socket_parent_frame=ground_offset socket_child_frame=link_0_offset
      PhysicalOffsetFrame ground_offset: socket_parent=/ground translation=(0 0 0) orientation=(-1.570796 0 -1.570796)
      PhysicalOffsetFrame link_0_offset: socket_parent=/bodyset/link_0 translation=(0 0 0)
    PinJoint Revolute0_1: socket_parent_frame=link_0_offset socket_child_frame=link_1_offset
      Coordinate Rotation0_1: default_value=-3.872199e-11 range=(-2.96706 2.96706) clamped=false prescribed=true
        prescribed_function: SimmSpline: x=(0 0.01 0.02 0.03 0.04 0.05 0.06 0.07 0.08 0.09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)
            y=(-3.8722e-11 -0.0190027 -0.0364822 -0.0525794 -0.0674428 -0.0812227 -0.0940651 -0.106108 -0.117478 -0.128291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)
      PhysicalOffsetFrame link_0_offset: socket_parent=/bodyset/link_0 translation=(0 0 0.1575)
      PhysicalOffsetFrame link_1_offset: socket_parent=/bodyset/link_1 translation=(0 0 0)
    PinJoint Revolute1_2: socket_parent_frame=link_1_offset socket_child_frame=link_2_offset
      Coordinate Rotation1_2: default_value=-0.5594687 range=(-2.094395 2.094395) clamped=false prescribed=true
        prescribed_function: SimmSpline: x=(0 0.01 0.02 0.03 0.04 0.05 0.06 0.07 0.08 0.09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)
            y=(-0.559469 -0.550327 -0.538307 -0.523658 -0.506928 -0.488569 -0.468955 -0.448395 -0.427144 -0.405415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)
      PhysicalOffsetFrame link_1_offset: socket_parent=/bodyset/link_1 translation=(0 0 0.183)
          orientation=(-1.5708 0 -3.14159)
      PhysicalOffsetFrame link_2_offset: socket_parent=/bodyset/link_2 translation=(0 0 0)
    PinJoint Revolute2_3: socket_parent_frame=link_2_offset socket_child_frame=link_3_offset
      Coordinate Rotation2_3: default_value=2.993987e-11 range=(-2.96706 2.96706) clamped=false prescribed=true
        prescribed_function: SimmSpline: x=(0 0.01 0.02 0.03 0.04 0.05 0.06 0.07 0.08 0.09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)
            y=(2.99399e-11 -0.0306316 -0.059573 -0.0869696 -0.112963 -0.13769 -0.161272 -0.183822 -0.205438 -0.226205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)
      PhysicalOffsetFrame link_2_offset: socket_parent=/bodyset/link_2 translation=(0 0.185 0)
          orientation=(-1.5708 0 3.14159)
      PhysicalOffsetFrame link_3_offset: socket_parent=/bodyset/link_3 translation=(0 0 0)
    PinJoint Revolute3_4: socket_parent_frame=link_3_offset socket_child_frame=link_4_offset
      Coordinate Rotation3_4: default_value=-2.094395 range=(-2.094395 2.094395) clamped=false prescribed=true
        prescribed_function: SimmSpline: x=(0 0.01 0.02 0.03 0.04 0.05 0.06 0.07 0.08 0.09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)
            y=(-2.0944 -2.0585 -2.02098 -1.98277 -1.94419 -1.90552 -1.86697 -1.82874 -1.79099 -1.75384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)
      PhysicalOffsetFrame link_3_offset: socket_parent=/bodyset/link_3 translation=(0 0 0.215) orientation=(1.5708 0 0)
      PhysicalOffsetFrame link_4_offset: socket_parent=/bodyset/link_4 translation=(0 0 0)
    PinJoint Revolute4_5: socket_parent_frame=link_4_offset socket_child_frame=link_5_offset
      Coordinate Rotation4_5: default_value=-9.943942e-12 range=(-2.96706 2.96706) clamped=false prescribed=true
        prescribed_function: SimmSpline: x=(0 0.01 0.02 0.03 0.04 0.05 0.06 0.07 0.08 0.09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)
            y=(-9.94394e-12 0.00340989 0.00662631 0.00964152 0.0124753 0.0151466 0.0176732 0.0200711 0.0223547 0.0245365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)
      PhysicalOffsetFrame link_4_offset: socket_parent=/bodyset/link_4 translation=(0 0.185 0)
          orientation=(-1.5708 0 3.14159)
      PhysicalOffsetFrame link_5_offset: socket_parent=/bodyset/link_5 translation=(0 0 0)
    PinJoint Revolute5_6: socket_parent_frame=link_5_offset socket_child_frame=link_6_offset
      Coordinate Rotation5_6: default_value=-0.4303642 range=(-2.094395 2.094395) clamped=false prescribed=true
        prescribed_function: SimmSpline: x=(0 0.01 0.02 0.03 0.04 0.05 0.06 0.07 0.08 0.09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)
            y=(-0.430364 -0.438571 -0.44283 -0.446771 -0.450398 -0.453714 -0.456722 -0.459424 -0.461823 -0.463924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)
      PhysicalOffsetFrame link_5_offset: socket_parent=/bodyset/link_5 translation=(0 0.0607 0.215)
          orientation=(1.5708 0 0)
      PhysicalOffsetFrame link_6_offset: socket_parent=/bodyset/link_6 translation=(0 0 0)
    PinJoint Revolute6_7: socket_parent_frame=link_6_offset socket_child_frame=link_7_offset
      Coordinate Rotation6_7: default_value=0 range=(-3.054326 3.054326) clamped=false prescribed=true
        prescribed_function: SimmSpline: x=(0 0.01 0.02 0.03 0.04 0.05 0.06 0.07 0.08 0.09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)
            y=(0 0 0 0 0 0 0 0 0 0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)
      PhysicalOffsetFrame link_6_offset: socket_parent=/bodyset/link_6 translation=(0 0.081 0.0607)
          orientation=(-1.5708 0 0)
      PhysicalOffsetFrame link_7_offset: socket_parent=/bodyset/link_7 translation=(0 0 0)
  ForceSet:
    CoordinateActuator Rotation0_1: coordinate=Rotation0_1 optimal_force=1
    CoordinateActuator Rotation1_2: coordinate=Rotation1_2 optimal_force=1
    CoordinateActuator Rotation2_3: coordinate=Rotation2_3 optimal_force=1
    CoordinateActuator Rotation3_4: coordinate=Rotation3_4 optimal_force=1
    CoordinateActuator Rotation4_5: coordinate=Rotation4_5 optimal_force=1
    CoordinateActuator Rotation5_6: coordinate=Rotation5_6 optimal_force=1
